r1 := 2
r2 := 1
l1 := 0.4
l2 := 0.5
c := 0.2
C := [r1, 0, 0; 0, r2, 0]
B := [1/l1, 0; 0, 1/l2; 0, 0]
A := [-r1/l1, 0, -1/l1; 0, -r2/l2, -1/l2; 1/c, 1/c, 0]
C → [2, 0, 0; 0, 1, 0]
A → [-5.0, 0, -2.5; 0, -2.0, -2.0; 5.0, 5.0, 0]
B → [2.5, 0; 0, 2.0; 0, 0]
E := [1, 0, 0; 0, 1, 0; 0, 0, 1]
S := [s, 0, 0; 0, s, 0; 0, 0, s]
K := E*S - A → [s + 5.0, 0, 2.5; 0, s + 2.0, 2.0; -5.0, -5.0, s]  # error: Значение имеет единицы измерения: Unitless, а должно иметь единицы измерения: время.
|E*S - A| → s^3 + 7.0*s^2 + 32.5*s + 75.0
K^-1 → [
    (2.0*s^2 + 4.0*s + 20.0)/(2.0*s^3 + 14.0*s^2 + 65.0*s + 150.0), -25.0/(2.0*s^3 + 14.0*s^2 + 65.0*s + 150.0), -1.0*(5.0*s + 10.0)/(2.0*s^3 + 14.0*s^2 + 65.0*s + 150.0);
    -20.0/(2.0*s^3 + 14.0*s^2 + 65.0*s + 150.0), (2.0*s^2 + 10.0*s + 25.0)/(2.0*s^3 + 14.0*s^2 + 65.0*s + 150.0), -1.0*(4.0*s + 20.0)/(2.0*s^3 + 14.0*s^2 + 65.0*s + 150.0);
    (10.0*s + 50.0)*(s + 2.0)/((s + 5.0)*(2.0*s^3 + 14.0*s^2 + 65.0*s + 150.0)), (10.0*s + 50.0)/(2.0*s^3 + 14.0*s^2 + 65.0*s + 150.0), (10.0*s + 50.0)*(0.2*s + 0.4)/(2.0*s^3 + 14.0*s^2 + 65.0*s + 150.0)
]
K1 := K^-1  # error: Эта переменная не определена.
C*K1*B → [
    5.0*(4.0*s + 2.0*s^2 + 20.0)/(65.0*s + 14.0*s^2 + 2.0*s^3 + 150.0), -100.0/(65.0*s + 14.0*s^2 + 2.0*s^3 + 150.0);
    -50.0/(65.0*s + 14.0*s^2 + 2.0*s^3 + 150.0), 2.0*(10.0*s + 2.0*s^2 + 25.0)/(65.0*s + 14.0*s^2 + 2.0*s^3 + 150.0)
]
5.0*(4.0*s + 2.0*s^2 + 20.0) → 20.0*s + 10.0*s^2 + 100.0
2.0*(10.0*s + 2.0*s^2 + 25.0) → 20.0*s + 4.0*s^2 + 50.0
