r := 2
g := 1
l := 0.4
c1 := 0.2
C := [g, 0; 0, r]
B := [1/c1, 0; 0, -1/l]
E := [1, 0; 0, 1]
S := [s, 0; 0, s]
A := [-g/c1, -1/c1; 1/l, -r/l]
A → [-5.0, -5.0; 2.5, -5.0]
B → [5.0, 0; 0, -2.5]
C → [1, 0; 0, 2]
K := E*S - A → [s + 5.0, 5.0; -2.5, s + 5.0]  # error: Значение имеет единицы измерения: Unitless, а должно иметь единицы измерения: время.
det := |K| → s^2 + 10.0*s + 37.5  # error: Значение имеет единицы измерения: время, а должно иметь единицы измерения: время^2.
K^-1 → [
    (2.0*s + 10.0)/(2.0*s^2 + 20.0*s + 75.0), -10.0/(2.0*s^2 + 20.0*s + 75.0);
    1/(0.4*s^2 + 4.0*s + 15.0), (0.4*s + 2.0)/(0.4*s^2 + 4.0*s + 15.0)
]
C*K*B → [5.0*s + 25.0, -12.5; -25.0, -5.0*s - 25.0]
C*[
    (2.0*s + 10.0)/(2.0*s^2 + 20.0*s + 75.0), -10.0/(2.0*s^2 + 20.0*s + 75.0);
    1/(0.4*s^2 + 4.0*s + 15.0), (0.4*s + 2.0)/(0.4*s^2 + 4.0*s + 15.0)
]*B → [
    5.0*(2.0*s + 10.0)/(20.0*s + 2.0*s^2 + 75.0), 25.0/(20.0*s + 2.0*s^2 + 75.0);
    10.0/(4.0*s + 0.4*s^2 + 15.0), -5.0*(0.4*s + 2.0)/(4.0*s + 0.4*s^2 + 15.0)
] expand → [
    50.0/(20.0*s + 2.0*s^2 + 75.0) + 10.0*s/(20.0*s + 2.0*s^2 + 75.0), 25.0/(20.0*s + 2.0*s^2 + 75.0);
    10.0/(4.0*s + 0.4*s^2 + 15.0), -10.0/(4.0*s + 0.4*s^2 + 15.0) - 2.0*s/(4.0*s + 0.4*s^2 + 15.0)
]
