A := [0, 1; -2, -2]
Adet := |A| → 2
B := [-1; 2]
E := [1, 0; 0, 1]
A - λ*E → [-λ, 1; -2, -λ - 2]
mat := A - λ*E → [-λ, 1; -2, -λ - 2]  # error: Эта переменная не определена.
|mat| → λ^2 + 2*λ + 2
# Вставить вручную ->>>
λ^2 + 2*λ + 2 solve → [-1 + 1i; -1 - 1i]
# Вставить вручную ->>>
λ1 := -1 + 1i
# Вставить вручную ->>>
λ2 := -1 - 1i
det1 := (A - λ2*E)/(λ1 - λ2) → [1/2 - 1/2*1i, -1/2*1i; 1i, 1/2 + 1/2*1i]
det2 := (A - λ1*E)/(λ2 - λ1) → [1/2 + 1/2*1i, 1/2*1i; -1i, 1/2 - 1/2*1i]
eat := det1*e^(λ1*t) + det2*e^(λ2*t) → [
    e^(t*(-1 - 1i))*(1/2 + 1/2*1i) + e^(t*(-1 + 1i))*(1/2 - 1/2*1i), e^(t*(-1 - 1i))*1i/2 - e^(t*(-1 + 1i))*1i/2;
    -e^(t*(-1 - 1i))*1i + e^(t*(-1 + 1i))*1i, e^(t*(-1 - 1i))*(1/2 - 1/2*1i) + e^(t*(-1 + 1i))*(1/2 + 1/2*1i)
] simplify → [e^(-t)*(cos(t) + sin(t)), e^(-t)*sin(t); -2*e^(-t)*sin(t), e^(-t)*(cos(t) - sin(t))]  # error: Эта переменная не определена.
eAtTau := det1*e^(λ1*(t - τ)) + det2*e^(λ2*(t - τ)) → [
    e^(τ*(1 - 1i) + t*(-1 + 1i))*(1/2 - 1/2*1i) + e^(τ*(1 + 1i) + t*(-1 - 1i))*(1/2 + 1/2*1i), -e^(τ*(1 - 1i) + t*(-1 + 1i))*1i/2 + e^(τ*(1 + 1i) + t*(-1 - 1i))*1i/2;
    -e^(τ*(1 + 1i) + t*(-1 - 1i))*1i + e^(τ*(1 - 1i) + t*(-1 + 1i))*1i, e^(τ*(1 - 1i) + t*(-1 + 1i))*(1/2 + 1/2*1i) + e^(τ*(1 + 1i) + t*(-1 - 1i))*(1/2 - 1/2*1i)
]  # error: Эта переменная не определена.
eAtTau*B → [
    e^(τ*(1 - 1i) + t*(-1 + 1i))*(-1/2 - 1/2*1i) + e^(τ*(1 + 1i) + t*(-1 - 1i))*(-1/2 + 1/2*1i);
    e^(τ*(1 - 1i) + t*(-1 + 1i)) + e^(τ*(1 + 1i) + t*(-1 - 1i))
]
integral(e^((t - τ)*(-1 - 1i))*(-1/2 + 1/2*1i) + e^((t - τ)*(-1 + 1i))*(-1/2 - 1/2*1i), τ = 0 .. t) → -e^(-t)*sin(t)
integral(e^((t - τ)*(-1 - 1i)) + e^((t - τ)*(-1 + 1i)), τ = 0 .. t) → e^(-t)*sin(t) - e^(-t)*cos(t) + 1
-e^(t*(-1 - 1i))*1i/2 + e^(t*(-1 + 1i))*1i/2 simplify → -e^(-t)*sin(t)
1 + e^(t*(-1 - 1i))*(-1/2 + 1/2*1i) + e^(t*(-1 + 1i))*(-1/2 - 1/2*1i) simplify → e^(-t)*sin(t) - e^(-t)*cos(t) + 1
