A := [0, 1; -2, -3]
Adet := |A| → 2
B := [0; 1]
E := [1, 0; 0, 1]
A - λ*E → [-λ, 1; -2, -λ - 3]
mat := A - λ*E → [-λ, 1; -2, -λ - 3]  # error: Эта переменная не определена.
|mat| → λ^2 + 3*λ + 2
# Вставить вручную ->>>
λ^2 + 3*λ + 2 solve → [-1; -2]
# Вставить вручную ->>>
λ1 := -1
# Вставить вручную ->>>
λ2 := -2
det1 := (A - λ2*E)/(λ1 - λ2) → [2, 1; -2, -1]
det2 := (A - λ1*E)/(λ2 - λ1) → [-1, -1; 2, 2]
eat := det1*e^(λ1*t) + det2*e^(λ2*t) → [2*e^(-t) - e^(-2*t), e^(-t) - e^(-2*t); 2*e^(-2*t) - 2*e^(-t), 2*e^(-2*t) - e^(-t)]  # error: Эта переменная не определена.
eAtTau := det1*e^(λ1*(t - τ)) + det2*e^(λ2*(t - τ)) → [
    2*e^(τ - t) - e^(2*τ - 2*t), e^(τ - t) - e^(2*τ - 2*t);
    2*e^(2*τ - 2*t) - 2*e^(τ - t), 2*e^(2*τ - 2*t) - e^(τ - t)
]  # error: Эта переменная не определена.
eAtTau*B → [e^(τ - t) - e^(2*τ - 2*t); 2*e^(2*τ - 2*t) - e^(τ - t)]
integral(e^(τ - t) - e^(2*τ - 2*t), τ = 0 .. t) → e^(-2*t)/2 - e^(-t) + 1/2
integral(2*e^(2*τ - 2*t) - e^(τ - t), τ = 0 .. t) → e^(-t) - e^(-2*t)
