A := [0, 1; -2, -2]
A^-1 → [-1, -1/2; 1, 0]
Adet := |A| → 2
B := [-1; 2]
E := [1, 0; 0, 1]
A1B := A^-1*B → [0; -1]
λ1 := -1 + 1i
λ2 := -1 - 1i
det1 := (A - λ2*E)/(λ1 - λ2) → [1/2 - 1/2*1i, -1/2*1i; 1i, 1/2 + 1/2*1i]
det2 := (A - λ1*E)/(λ2 - λ1) → [1/2 + 1/2*1i, 1/2*1i; -1i, 1/2 - 1/2*1i]
eat := det1*e^(λ1*t) + det2*e^(λ2*t) → [
    e^(t*(-1 - 1i))*(1/2 + 1/2*1i) + e^(t*(-1 + 1i))*(1/2 - 1/2*1i), e^(t*(-1 - 1i))*1i/2 - e^(t*(-1 + 1i))*1i/2;
    -e^(t*(-1 - 1i))*1i + e^(t*(-1 + 1i))*1i, e^(t*(-1 - 1i))*(1/2 - 1/2*1i) + e^(t*(-1 + 1i))*(1/2 + 1/2*1i)
]  # error: Эта переменная не определена.
eatE := eat - E → [
    -1 + e^(t*(-1 + 1i))*(1/2 - 1/2*1i) + e^(t*(-1 - 1i))*(1/2 + 1/2*1i), e^(t*(-1 - 1i))*1i/2 - e^(t*(-1 + 1i))*1i/2;
    -e^(t*(-1 - 1i))*1i + e^(t*(-1 + 1i))*1i, -1 + e^(t*(-1 + 1i))*(1/2 + 1/2*1i) + e^(t*(-1 - 1i))*(1/2 - 1/2*1i)
]  # error: Эта переменная не определена.
eatE*A1B → [
    -e^(t*(-1 - 1i))*1i/2 + e^(t*(-1 + 1i))*1i/2;
    1 + e^(t*(-1 - 1i))*(-1/2 + 1/2*1i) + e^(t*(-1 + 1i))*(-1/2 - 1/2*1i)
]
-e^(t*(-1 - 1i))*1i/2 + e^(t*(-1 + 1i))*1i/2 simplify → -e^(-t)*sin(t)
1 + e^(t*(-1 - 1i))*(-1/2 + 1/2*1i) + e^(t*(-1 + 1i))*(-1/2 - 1/2*1i) simplify → e^(-t)*sin(t) - e^(-t)*cos(t) + 1
