A := [0, 1; -2, -3]
A^-1 → [-3/2, -1/2; 1, 0]
Adet := |A| → 2
B := [0; 1]
E := [1, 0; 0, 1]
A1B := A^-1*B → [-1/2; 0]
λ1 := -1
λ2 := -2
det1 := (A - λ2*E)/(λ1 - λ2) → [2, 1; -2, -1]
det2 := (A - λ1*E)/(λ2 - λ1) → [-1, -1; 2, 2]
eat := det1*e^(λ1*t) + det2*e^(λ2*t) → [2*e^(-t) - e^(-2*t), e^(-t) - e^(-2*t); 2*e^(-2*t) - 2*e^(-t), 2*e^(-2*t) - e^(-t)]  # error: Эта переменная не определена.
eatE := eat - E → [2*e^(-t) - e^(-2*t) - 1, e^(-t) - e^(-2*t); 2*e^(-2*t) - 2*e^(-t), 2*e^(-2*t) - e^(-t) - 1]  # error: Эта переменная не определена.
eatE*A1B → [e^(-2*t)/2 - e^(-t) + 1/2; e^(-t) - e^(-2*t)]
