A := [0, -1/4; 1, -1/2]
Adet := |A| → 1/4
B := [10; 10]
E := [1, 0; 0, 1]
A - λ*E → [-λ, -1/4; 1, -λ - 1/2]
mat := A - λ*E → [-λ, -1/4; 1, -λ - 1/2]  # error: Эта переменная не определена.
|mat| → λ^2 + λ/2 + 1/4
# Вставить вручную ->>>
λ^2 + λ/2 + 1/4 solve → [-1/4 + sqrt(3)*1i/4; -1/4 - sqrt(3)*1i/4]
# Вставить вручную ->>>
λ1 := -1/4 + sqrt(3)*1i/4
# Вставить вручную ->>>
λ2 := -1/4 - sqrt(3)*1i/4
α := -1/4
β := sqrt(3)/4
AalphaE := A - α*E → [1/4, -1/4; 1, -1/4]
eAt := e^(α*t)*(AalphaE/β*sin(β*t) + E*cos(β*t)) → [
    e^(-t/4)*(cos(sqrt(3)*t/4) + sqrt(3)*sin(sqrt(3)*t/4)/3), -sqrt(3)*e^(-t/4)*sin(sqrt(3)*t/4)/3;
    4*sqrt(3)*e^(-t/4)*sin(sqrt(3)*t/4)/3, e^(-t/4)*(cos(sqrt(3)*t/4) - sqrt(3)*sin(sqrt(3)*t/4)/3)
]  # error: Эта переменная не определена.
Xt := (eAt - E)*A^-1*B → [
    40*sqrt(3)*e^(-t/4)*sin(sqrt(3)*t/4)/3 - 10*e^(-t/4)*(cos(sqrt(3)*t/4) + sqrt(3)*sin(sqrt(3)*t/4)/3) + 10;
    40 - 40*sqrt(3)*e^(-t/4)*sin(sqrt(3)*t/4)/3 - 40*e^(-t/4)*(cos(sqrt(3)*t/4) - sqrt(3)*sin(sqrt(3)*t/4)/3)
] expand → [
    10*sqrt(3)*e^(-t/4)*sin(sqrt(3)*t/4) - 10*e^(-t/4)*cos(sqrt(3)*t/4) + 10;
    40 - 40*e^(-t/4)*cos(sqrt(3)*t/4)
]  # error: Эта переменная не определена.
ht := (40 - 40*e^(-t/4)*cos(sqrt(3)*t/4))/4 → 10 - 10*e^(-t/4)*cos(sqrt(3)*t/4)  # error: Эта переменная не определена.
# Не забыть убрать!!!>>
eAt*B → [
    10*e^(-t/4)*(cos(sqrt(3)*t/4) + sqrt(3)*sin(sqrt(3)*t/4)/3) - 10*sqrt(3)*e^(-t/4)*sin(sqrt(3)*t/4)/3;
    10*e^(-t/4)*(cos(sqrt(3)*t/4) - sqrt(3)*sin(sqrt(3)*t/4)/3) + 40*sqrt(3)*e^(-t/4)*sin(sqrt(3)*t/4)/3
]
wt := (10*e^(-t/4)*(cos(sqrt(3)*t/4) - sqrt(3)*sin(sqrt(3)*t/4)/3) + 40*sqrt(3)*e^(-t/4)*sin(sqrt(3)*t/4)/3)/4 → 5*e^(-t/4)*(cos(sqrt(3)*t/4) - sqrt(3)*sin(sqrt(3)*t/4)/3)/2 + 10*sqrt(3)*e^(-t/4)*sin(sqrt(3)*t/4)/3 simplify → 5*e^(-t/4)*(cos(sqrt(3)*t/4) + sqrt(3)*sin(sqrt(3)*t/4))/2  # error: Эта переменная не определена.
# Не забыть убрать!!!>>
'
5*e^(-t/4)*(cos(sqrt(3)*t/4) + sqrt(3)*sin(sqrt(3)*t/4))/2 → 5*e^(-t/4)*(cos(sqrt(3)*t/4) + sqrt(3)*sin(sqrt(3)*t/4))/2
ПРОВЕРКА
d/dt(ht) → 5*e^(-t/4)*cos(sqrt(3)*t/4)/2 + 5*sqrt(3)*e^(-t/4)*sin(sqrt(3)*t/4)/2
