A := [-6, -2.5; 4, 0]
Adet := |A| → 10.0
B := [1; 0]
E := [1, 0; 0, 1]
A - λ*E → [-λ - 6, -2.5; 4, -λ]
mat := A - λ*E → [-λ - 6, -2.5; 4, -λ]  # error: Эта переменная не определена.
|mat| → λ^2 + 6.0*λ + 10.0
# Вставить вручную ->>>
λ^2 + 6.0*λ + 10.0 solve → [-3.0 - 1.0i; -3.0 + 1.0i]
# Вставить вручную ->>>
λ1 := -3.0 - 1.0i
# Вставить вручную ->>>
λ2 := -3.0 + 1.0i
α := -3
β := 1
AalphaE := A - α*E → [-3, -2.5; 4, 3]
eAt := e^(α*t)*(AalphaE/β*sin(β*t) + E*cos(β*t)) → [
    e^(-3*t)*(cos(t) - 3*sin(t)), -2.5*e^(-3*t)*sin(t);
    4*e^(-3*t)*sin(t), e^(-3*t)*(cos(t) + 3*sin(t))
]  # error: Эта переменная не определена.
Xt := (eAt - E)*A^-1*B → [1.0*e^(-3*t)*sin(t); -0.4*e^(-3*t)*(cos(t) + 3*sin(t)) + 0.4] expand → [1.0*e^(-3*t)*sin(t); -0.4*e^(-3*t)*cos(t) + (-1.2*e^(-3*t)*sin(t)) + 0.4]  # error: Эта переменная не определена.
ht := (-0.4*e^(-3*t)*cos(t) + (-1.2*e^(-3*t)*sin(t)) + 0.4)/4 → -0.1*e^(-3*t)*cos(t) + (-0.3*e^(-3*t)*sin(t)) + 0.1  # error: Эта переменная не определена.
# Не забыть убрать!!!>>
eAt*B → [e^(-3*t)*(cos(t) - 3*sin(t)); 4*e^(-3*t)*sin(t)]
wt := 4*e^(-3*t)*sin(t)/4 → e^(-3*t)*sin(t) simplify → e^(-3*t)*sin(t)  # error: Эта переменная не определена.
# Не забыть убрать!!!>>
'
ПРОВЕРКА
d/dt(ht) → 0.1*e^(-3*t)*sin(t) + 0.9*e^(-3*t)*sin(t) + (-0.3*e^(-3*t)*cos(t)) + 0.3*e^(-3*t)*cos(t) simplify → e^(-3.0*t)*sin(t)
t := 0 .. 25
h(t) := -0.1*e^(-3*t)*cos(t) + (-0.3*e^(-3*t)*sin(t)) + 0.1
w(t) := e^(-3*t)*sin(t)
w(t) = [0; 0.0418944; 0.00225392; 1.74156e-5; -4.64996e-6; -2.93337e-7; -4.25549e-9; 4.98164e-10; 3.73496e-11; 7.74589e-13; -5.09074e-14; -4.65884e-15; 0; 0; 0; 0; 0; 0; 0; 0; 0; 0; 0; 0; 0; 0]
h(t) = [0; 0.0847417; 0.099427; 0.100007; 0.100002; 0.1; 0.1; 0.1; 0.1; 0.1; 0.1; 0.1; 0.1; 0.1; 0.1; 0.1; 0.1; 0.1; 0.1; 0.1; 0.1; 0.1; 0.1; 0.1; 0.1; 0.1]
t = [0; 1; 2; 3; 4; 5; 6; 7; 8; 9; 10; 11; 12; 13; 14; 15; 16; 17; 18; 19; 20; 21; 22; 23; 24; 25]
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