L := 1
C := 0.5
R := 3
A := [-R/L, -1/L; 1/C, 0] → [-3, -1; 2.0, 0]
B := [1; 0]
E := [1, 0; 0, 1]
A^-1 → [0, 0.5; -1, -1.5]
ALambdaE := A - λ*E → [-λ - 3, -1; 2.0, -λ]  # error: Эта переменная не определена.
|ALambdaE| → λ^2 + 3.0*λ + 2.0
λ^2 + 3.0*λ + 2.0 solve → [-2.0; -1.0]
λ1 := -2
λ2 := -1
eAt := (A - λ2*E)/(λ1 - λ2)*e^(λ1*t) + (A - λ1*E)/(λ2 - λ1)*e^(λ2*t) → [2*e^(-2*t) - e^(-t), e^(-2*t) - e^(-t); 2.0*e^(-t) + (-2.0*e^(-2*t)), 2*e^(-t) - e^(-2*t)]  # error: Эта переменная не определена.
Integrate := (eAt - E)*A^-1*B → [e^(-t) - e^(-2*t); e^(-2*t) - 2*e^(-t) + 1]  # error: Эта переменная не определена.
# Дописать с методички!
