L := 1
C := 0.1
R := 6
A := [-R/L, -1/L; 1/C, 0] → [-6, -1; 10.0, 0]
B := [0; 1]
E := [1, 0; 0, 1]
A^-1 → [0, 0.1; -1, -0.6]
ALambdaE := A - λ*E → [-λ - 6, -1; 10.0, -λ]  # error: Эта переменная не определена.
|ALambdaE| → λ^2 + 6.0*λ + 10.0
λ^2 + 6.0*λ + 10.0 solve → [-3.0 - 1.0i; -3.0 + 1.0i]
λ1 := -3.0 - 1.0i
λ2 := -3.0 + 1.0i
eAt := (A - λ2*E)/(λ1 - λ2)*e^(λ1*t) + (A - λ1*E)/(λ2 - λ1)*e^(λ2*t) → [
    (0.5 - 1.5i)*e^(-(3.0 + 1.0i)*t) + (0.5 + 1.5i)*e^(-(3.0 - 1.0i)*t), 0.5i*e^(-(3.0 - 1.0i)*t) - 0.5i*e^(-(3.0 + 1.0i)*t);
    5.0i*e^(-(3.0 + 1.0i)*t) - 5.0i*e^(-(3.0 - 1.0i)*t), (0.5 + 1.5i)*e^(-(3.0 + 1.0i)*t) + (0.5 - 1.5i)*e^(-(3.0 - 1.0i)*t)
]  # error: Эта переменная не определена.
Integrate := (eAt - E)*A^-1*B → [
    (0.05 + 0.15i)*e^(-(3.0 + 1.0i)*t) + (0.05 - 0.15i)*e^(-(3.0 - 1.0i)*t) - 0.1;
    0.6 - (0.3 - 0.4i)*e^(-(3.0 - 1.0i)*t) - (0.3 + 0.4i)*e^(-(3.0 + 1.0i)*t)
]  # error: Эта переменная не определена.
# Дописать с методички!
